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g(x) := -3/2*x + 15
f(x) := x^2 - 3*x + C_3
S := g(-2) → 18
f(-2) == S solve, C_3 → 8
C := 8
f(x) := x^2 - 3*x + C → x^2 - 3*x + 8  # A: C ist 8
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# a)
P(t) := 300000/(300 + 700*e^(-0.2*t))
P(t) == 900 solve, t → 15.2226121886  # A: Nach 16 Jahren
# b)
P(t) == 1000 solve, t → 294.468969105
limit(P(t), t → ∞) → 1000.0
# Arg: Der Grenzwert von einer Population von 1000 Tieren kann nicht erreicht werden.
# c)
N(t) := 300000/(300 + 700*e^(a*t))
a := -0.2
N(t) := 300000/(300 + 700*e^(a*t))
N(100) → 999.999995191
a := -0.1
N(t) := 300000/(300 + 700*e^(a*t))
N(100) = 999.894
# Untersuchung: Desto größer a wird, desto kleiner wird das Wachstum
# 6)
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# a)
f(t) := 24300*0.86^t → 24300.0*0.86^t
# b)
f(t) == 24300/2 solve, t → 4.59576912881
# A) Nach 4.6 Jahren ist das Fahrzeug nur noch die Hälfte wert.
# c)
f(0) - f(1) → 3402.0
# 8)
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# Nummer 3 stimmt)
# 9)
s(t) := 1/2*20*t^2
d(t) := 1/2*20*(t - 2)^2
s(0) → 0
d(0) → 40
s(1) → 10
d(1) → 10
s(2) = 40
d(2) = 0
s(3) → 90
d(3) → 10
d(4) → 40
# 10)
A(t) := 15*e^(0.39*t)
# a)
# A: 15
# b)
A(8) → 339.695694648
# A: Es befinden sich 339 Milchsäurebakterien nach 8 Stunden in der Näherungslösung
# 11)
T(t) := T_R - (T_R - T_0)*e^(-k*t)
T_R := 28
T_0 := 4
T(t) := T_R - (T_R - T_0)*e^(-k*t)
T(2) == 8 solve, k → -ln(5/6)/2
8 == 28 - 24*e^(-k*2)
-20 == -24*e^(-k*2)
5/6 == e^(-2*k)
ln(5/6)/(-2) == k
# b)
T(t) == K*(1 - C*a^t)
T(t) == T_R - (T_R - T_0)*a^t
T(t) == K - (1 - (T_R - T_0)/T_R*a^t)
T(t) == K*(1 - C*a^t)
# 12)
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0.5^2 → 0.25
0.5^3 → 0.125
# 13)
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# 14)
(0.95 + 0.9)/2 = 0.925
# A: Zu 92.5 % besteht die Wahrscheinlichkeit, dass ein Transport ohne Schaden besteht.
# 17)
X := [82; 91; 88; 73; 85; 77; 81; 89; 75; 79; 80; 71]
μ := mean(X) = 80.9167
σ := 3.8
α := 0.01
qnorm(α/2, μ, σ/sqrt(12)) = 78.0911
qnorm(1 - α/2, μ, σ/sqrt(12)) = 83.7423
# 18)
α := 0.05
σ := 0.65
z := qnorm(α, 0, 1) = -1.64485
z == (80 - μ1)/σ solve, μ1 → 81.0691548575
# 20)
α := 0.05
μ := 1500*0.4 = 600
σ := sqrt(1500*0.4*(1 - 0.4)) = 18.9737
μ_u := qnorm(α/2, μ, σ/sqrt(1500)) = 599.04
μ_u := qnorm(1 - α/2, μ, σ/sqrt(1500)) = 600.96
# 28)
α := 0.15
qnorm(1 - α, 125, 1.5) = 126.555
# 29)
α := 0.15
μ := 600
clear(σ)
z := qnorm(1 - α, 0, 1) = 1.03643
# a)
σ := (700 - 600)/σ == z solve, σ → 96.4847341022
# b)
pnorm(650, μ, σ) - pnorm(450, μ, σ) = 0.637832
# c)
α := 0.1
μ_u := qnorm(α/2, μ, σ) = 441.297
μ_o := qnorm(1 - α/2, μ, σ) = 758.703
# d)
α := 0.05
qnorm(1 - α, μ, σ) = 758.703
# 31)
α := 0.05
n := 20
μ := 150
σ := 50
α := 0.05
μ_u := μ - qt(1 - α/2, n - 1)*σ/sqrt(n) = 126.599
μ_o := μ + qt(1 - α/2, n - 1)*σ/sqrt(n) = 173.401
# 32)
z_1 := qnorm(0.05, 0, 1) = -1.64485
clear(μ, σ)
z_2 := qnorm(1 - 0.01, 0, 1) = 2.32635
[(21.9 - μ)/σ == z_1; (22.2 - μ)/σ == z_2] solve, μ, σ → [22.0242586376, 0.0755438876433]
# 34)
α := 0.05
clear(σ)
z := qnorm(α/2, 0, 1) = -1.95996
[(57 - 60)/σ == z] solve, σ → 1.53064037077
z := qnorm(1 - α/2, 0, 1) = 1.95996
(63 - 60)/σ == z solve, σ → 1.53064037077
# 35)
μ := 30
σ := 0.05
# a)
pnorm(30.1, μ, σ) - pnorm(30, μ, σ) = 0.47725  # A: 47.72 %
# b)
pnorm(29.9, μ, σ) = 0.0227501  # A: 2.28 %
# c)
α := 0.5% → 0.005
z := qnorm(α, 0, 1) = -2.57583
(30 - x)/σ == z solve, x → 30.1287914652  # A: Die Maschine müsste auf 30.13 ml eingestellt werden.
# 38)
f(x) := 1/24*(x^4 - 18*x^2 + 81)
f'(x) := d/dx(f(x)) → (x^3 - 9*x)/6
f''(x) := d/dx(f'(x)) → (x^2 - 3)/2
f(x) == 0 solve, x → [3; 3; -3; -3]
# a)
f'(3) → 0
f(-3) → 0
# b)
f'(x) == 0 solve, x → [0; 3; -3]
# Begründung: Mit der ersten Ableitung gleich null setzten bekommt man die Extremstellen und anhand der Grafik kann man erkennen, dass die Höhe des Dammes bei x = 0 liegt.
f(0) = 3.375  # A: Der Damm hat eine Höhe von 3.375 m
# [plot: f(x) vs x]
f(x) == f(0)/2 solve, x; assume, x ≥ -3, x ≤ 3 → [3*sqrt(-(2*sqrt(2)) + 4)/2; -(3*sqrt(-(2*sqrt(2)) + 4))/2] = [1.62359; -1.62359]
# A: Der Damm ist 3.248 Meter auf seiner halben Höhe breit
# 41)
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x := sqrt(a^2 + s^2 - 2*a*s*cos(90*deg*alpha))
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clear(a)
(B)
x := sqrt(a^2 + s^2 - 2*a*s*cos(α + 90*deg))
a := 73
s := 150
α := 48 deg
x := sqrt(a^2 + s^2 - 2*a*s*cos(α + 90 deg)) = 210.009
# 42)
c := 0.8
d := 0.6
f := 1
e := 0.8
β := 65 deg = 1.13446
b := sin(β) == 0.8/b solve, b → 0.88270233517
g := sqrt(b^2 - e^2) = 0.373046
h := 0.8 + h == g + 0.6 solve, h → 0.173046126524
a := sqrt(h^2 + 0.8^2) → 0.818501656629
α := asin(0.8/a) = 77.7945 deg
# 45)
clear(a, b, c, d)
K(x) := a*x^3 + b*x^2 + c*x + d
K'(x) := d/dx(K(x)) → 3*a*x^2 + 2*b*x + c
K''(x) := d/dx(K'(x)) → 6*a*x + 2*b
C(x) := K(x)/x → (a*x^3 + b*x^2 + c*x + d)/x
C'(x) := d/dx((a*x^3 + b*x^2 + c*x + d)/x) → 2*a*x + (b - d/x^2)
[C'(25) == 0; K(25) == 22500; K''(10) == 0; K'(10) == 450] solve, a, b, c, d → [2/3, -20, 650, 25000/3] = [0.666667, -20, 650, 8333.33]
# RICHTIG oder FALSCH? Kreuzen Sie die jeweils richtige Antwort an!
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richtig
# falsch Zuerst steigen dann fallen
falsch
falsch
richtig
# 47)
clear(x)
K(x) := 0.2*x^2 + 8*x + 280 - 500/(x + 4)
n(x) := 220 - 4*x
n'(x) := d/dx(n(x))
# a)
K(0) → 155.0
# b)
E(x) := n(x)*x → x*(-(4*x) + 220)
G(x) := E(x) - K(x) → 500.0/(x + 4.0) + (x*(220.0 - 4.0*x) - (0.2*x^2 + 8.0*x + 280.0))
G(x) == 0 solve, x; assume, x > 0 → [0.848593253891; 49.1657771612]
# A: Der Breakevenpoint liegt bei 1 Me und die obere Gewinngrenze bei 49 ME.
G'(x) := d/dx(G(x)) → -1.0*(0.847032947254*10^-21*x + 500.0)/(x^2 + 8.0*x + 16.0) + (212.0 - 8.4*x)
x_max := G'(x) == 0 solve, x; assume, x > 0 → 25.16813142
G(x_max) → 2412.35953278
# Cournotscher Punkt:
n(x_max) → 119.32747432
# C(25,16|119.33)
C(x) := K(x)/x
C'(x) := d/dx(C(x)) → (0.330872245021*10^-23*x^3 - 280.0*x^2 - 1240.0*x - 2480.0)/(x^4 + 8.0*x^3 + 16.0*x^2) + 0.2
x_opt := C'(x) == 0 solve, x; assume, x > 0 → 35.7861058107
η := -n(x_opt)/(x_opt*n'(x_opt)) → 0.536909332661
# η<1 => unelastisch
# 49)
f(x) := -0.00108*x^3 + 0.046*x^2 - 0.4367*x + 3
f'(x) := d/dx(f(x)) → -0.00324*x^2 + 0.092*x - 0.4367
f'(x) == 0 solve, x → [6.0252648368; 22.3697968916]
f(25) → 3.9575
f(24) → 4.08528
# a)
2*f(22.3698) → 8.3206525277
2*f(6.02526) → 3.60500616254
# b)
π*integral(|f(x)^2|, x = 2 .. 23) → 574.304703033  # ml
# c)
π*integral(|f(x)^2|, x = 2 .. t) == 800 solve, t; assume, t > 0 → 27.9510708859
# A: Die Vase müsste 25.95 cm Hoch sein
# 50)
W(t) := 1/10*t^2
integral(W(t), t = 0 .. 10) = 33.3333
# A: Die Pflanze wächst in den ersten 10 Tagen um 33.33 cm
# 51)
f(x) := 85/5 - 116/1125*x^2
f'(x) := d/dx(f(x))
# a)
α := 180 deg - |atan(f'(7.5))|
# b)
45 + 6*integral(sqrt(1 + f'(x)^2), x = 0 .. 7.5) → 104.193476826
# 52)
clear(μ, σ)
α := 0.05
z_1 := qnorm(α/2, 0, 1) = -1.95996
z_2 := qnorm(1 - α/2, 0, 1) = 1.95996
# a)
[μ, σ] := [(2500 - μ)/σ == z_1; (4500 - μ)/σ == z_2] solve, μ, σ → [3500, 510.213456925]
# b) per Hand
# c)
1 - pnorm(4000, μ, σ) = 0.163548  # A: Mit einer Wahrscheinlichkeit von 16.35 % wiegt ein Neugeborenes mehr als wie 4 kg.
# 53)
# a)
AC := 28
CB := 115 - 28 → 87
α := 120 deg = 2.0944
AB := sqrt(AC^2 + CB^2 - 2*AC*CB*cos(α)) → 103.870111197
# A: AB ist 103.87 cm lang
# b)
[AC, CB] := [AB == sqrt(AC_n^2 + CB_n^2); AC_n + CB_n == 115] solve, AC_n, CB_n; assume, AC_n < CB_n → [11.802625896, 103.197374104]
AC → 11.802625896  # A: Von Punkt A zu Punkt C liegt dann eine Entfernung von 11.802 cm
# 54)
# a)
# A: Das Hafenbecken hat eine Mindesthöhe bei 6 m
# b)
# A: Die Zeitpunkte, wo sich die maximale und minimale Hafenbeckentiefe befindet, kann damit berechnet werden.
# 55)
clear(a, b, c)
b_4(v) := a*v^2 + b*v + c
b'_4(v) := d/dv(b_4(v)) → 2*a*v + b
[a, b, c] := [b'_4(40) == 0; b_4(40) == 3.9; b_4(100) == 6] solve, a, b, c; float, 2 → [0.00058, -0.047, 4.8]
b_4(v) := a*v^2 + b*v + c float, 2 → 0.00058*v^2 - 0.047*v + 4.8
# 56)
A := 10
b := π/180
c := 13
f(t) := A*sin(b*t - 2*π/3) + c
f'(t) := d/dt(f(t))
f'(t) == 0 solve, t → 30
f(210) → 23
f(30) → 3
# 59)
# A: Hier wird die Fläche einer Bremsschwelle berechnet
# 60)
f(x) := 1/(0.1*x + 0.35) - 0.85
ns := f(x) == 0 solve, x → 8.26470588235
π*integral(f(x)^2, x = 0 .. ns) → 17.0678979488
# A: 17.068 VE beträgt das Volumen
# 61)
X := [3; 4; 5; 6; 9.5; 11; 17]
Y := [130; 250; 280; 350; 600; 800; 1000]
clear(k)
# a)
f(x, k, d) := k*x + d
genfit(X, Y, [1; 1], f) = [63.9717; -20.0611]
[k; d] := genfit(X, Y, [1; 1], f) = [63.9717; -20.0611]
f(x) := k*x + d → 63.9716658526*x - 20.0610649732
# b)
# [plot: f(x), Y vs x, X]
# c)
f(15) → 939.513922816
# 63)
p(t) := 0.0066*t^2 - 1.1134*t + 36.2106
# a)
# [plot: p(t) vs t]
# b)
p'(t) := d/dt(p(t)) → 0.0132*t - 1.1134
p'(t) == 0 solve, t → 84.3484848485
# A: Bei 84.348 Stunden nimmt der Pegelstand der Donau am schnellsten zu
# c)
# A: Ja kann Sie.
# Begr:
P(t) := integral(p(t), t) + C_k → 0.0001*t*(22.0*t^2 - 5567.0*t + 362106.0) + C_k
C_k := 700
t := x
P(x) := integral(p(t), t) + C_k → 0.0001*x*(22.0*x^2 - 5567.0*x + 362106.0) + 700.0
P(t) → 0.0001*x*(22.0*x^2 - 5567.0*x + 362106.0) + 700.0
# 64)
clear(a, b, c, d, e, x, t, y, y')
k := 0.1
y(x) := -1/20*x^2
# a)
g(x) := k*x + d
y'(x) := d/dx(y(x)) → -x/10
y'(x) == 0.1 solve, x → -1.0
# b)
P := [-1; -1/20]
k := 0.1
d := -1/20 == -1*k + d solve, d → 0.05
g(x) := k*x + d → 0.1*x + 0.05
# c)
y(-20) - g(-20) → -18.05
y(15) - g(15) → -12.8
# d)
h(x) := 1/100*x^3 - 3/4*x^2 + 4
N := h(x) == 2.5 solve, x; float → [74.9733143467; -1.40118532853; 1.42787098179]
b := |N[1]| + N[2] → 2.82905631031
# [plot: h(x), 2.5 vs x]
# A: Die Breite des Gehwegs beträgt 2.83 Meter
