# 1)
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# i)
k := (a + c)*h
V := k/2*H → H*h*(c + a)/2
# A: Richtig
# ii)
n := (a + c)*h/2
V := 1/n → 2/(h*(c + a))
# A: Falsch
# iii)
clear(V, a, c, h)
a(c) := V == (a + c)*h/2 solve, a → (-(c*h) + 2*V)/h
a(c) → (-(c*h) + 2*V)/h
# A: Die Funktion a(c) ist keine lineare Funktion, denn k*x + d wird von der Funktion a(c) nicht erfüllt.
# 2)
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clear(a)
f(x) := C*a^x
f'(x) := d/dx(f(x)) → C*ln(a)*a^x
# a)
# Faktor ist richtig
# b)
# Falsch
# c)
# Falsch
# d)
# Richtig
# e)
# Falsch
# 3)
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# 4)
g(x) := -3/2*x + 15
f(x) := x^2 - 3*x + C
[f(-2) == g(-2)] solve, C → 8
f(x) := x^2 - 3*x + 8
# 5)
P(t) := 300000/(300 + 700*e^(-0.2*t))
# a)
P(t) == 900 solve, t → 15.2226121886
# A: Nach 15.22 Jahren
# b)
P(t) == 1000 solve, t → 294.468969105
# A: Argumentation: Ja es kann eine Population von 1000 Tieren erreicht werden.
# c)
a := 2
N(t) := 300000/(300 + 700*e^(a*t))
N(80) = 1.39607e-67
a := 1
N(t) := 300000/(300 + 700*e^(a*t))
N(80) = 7.73508e-33
a := 3
N(t) := 300000/(300 + 700*e^(a*t))
N(80) = 2.51969e-102
# Untersuchung: Desto größer der Faktor a wird, desto weniger Tier Population im selben Zeitraum.
# 6)
f(x) := x^2
g(x) := 2*x - 1
f(x) == g(x) solve, x → [1; 1]
# Tangente, weil es nur in einem Punkt schneidet
# 7)
p := 0.14
P := 24300
# a)
f(t) := P*(1 - p)^t → 24300.0*0.86^t
# b)
f(t) == P/2 solve, t → 4.59576912881
# A: Nach 4.6 Jahren ist der PKW nur noch die Hälfte Wert
# c)
f'(t) := d/dt(f(t)) → -3664.99622055*0.86^t
f'(0) → -3664.99622055
# A: Der Wertverlust für ein neuwertiges Fahrzeug beträgt 3665 €
# 8)
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# a)
# Falsch, weil der Radfahrer mehr Weg zurück legt.
# b)
# Falsch
# c)
# Falsch weil sy einen kleineren Weg zurück, denn der Autofahrer fährt ja eine Stunde früher los.
# d)
# Richtig siehe Grafik.
# 9)
# a)
a := 20
s(t) := 1/2*a*t^2
s(t) → 10*t^2
# i)
# [plot: s(t) vs t]
# ii)
a := 40
s(t) := 1/2*a*t^2
# [plot: s(t) vs t]
# A: Wenn sich die Beschleunigung verdoppelt wird der Funktionswert s(t) auch verdoppelt.
# b)
a := 20
s(t) := 1/2*a*t^2 → 10*t^2  # Rakete Apollo 1 Funktionsgleichung
s_2(t) := 1/2*a*(t + 2)^2 → 10*(t + 2)^2  # Rakete Apollo 2 Funktionsgleichung
# 10)
A(t) := 15*e^(0.39*t)
# a)
A(0) → 15.0  # A: 15 Milchsäurebakterien wurden in die Nährlösung gegeben.
# b)
A(8) → 339.695694648
# A: Es befinden sich 339.7 Milchsäurebakterien in der Nährlösung
# c)
A(t) == 60 solve, t → 3.55460092595
# A: Nach 3.55 Stunden
# d)
# Um 1.48% wächst die Bakterienanzahl pro Stunde
# 11)
# 12)
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# A:
0.1^0.1 → 0.794328234724
# A: Falsch
# B:
1.001^0.000001 → 1.000000001
# A: Richtig. Solange a > 1 ist und t < 0 ist a^t immer größer als wie 1
# C:
N(t) := 0.0001*0.0001^t
# [plot: N(t) vs t]
# A: Richtig
# D:
clear(a)
N(t) := -2^t
# [plot: N(t) vs t]
# A: Richtig. Solange a<1 ist die Funktion streng monoton fallend.
# E:
# Richtig.
# 13)
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# 14)
p_B := 0.05
p_L := 0.1
(0.95 + 0.9)/2 → 0.925
# A: Zu 92.5 % erhält der Kunstgegenstand keinen Transportschaden.
# 15)
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X := [17; 20; 21; 22; 24]
Y := [2; 3; 3; 1; 4]
# a)
x_mean := (17*2 + 20*3 + 21*3 + 22 + 24*4)/(2 + 3 + 3 + 1 + 4) = 21.1538
σ := sqrt((17 - x_mean)^2*2/13 + (20 - x_mean)^2*3/13 + (21 - x_mean)^2*3/13 + (22 - x_mean)^2*1/13 + (24 - x_mean)^2*4/13) = 2.34836
# b)
# 17)
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X := [82; 91; 88; 73; 85; 77; 81; 89; 75; 79; 80; 71]
σ := 3.8
μ := mean(X)
α := 0.01
n := 12
μ - qt(1 - α/2, n - 1)*σ/sqrt(n) = 77.5097
μ + qt(1 - α/2, n - 1)*σ/sqrt(n) = 84.3236
# 18)
μ := 1.5
σ := 0.05
pnorm(1.6, μ, σ) = 0.97725
pnorm(1.5, 1.5, 0.05) = 0.5
# 19)
X := [82; 91; 88; 73; 85; 77; 81; 75; 79; 80; 71; 89]
α := 0.01
μ := mean(X) = 80.9167
σ := 3.8
n := rows(X) → 12
qnorm(α/2, μ, σ/sqrt(n)) = 78.0911
qnorm(1 - α/2, μ, σ/sqrt(n)) = 83.7423
# 20)
q := 0.288
p := 0.4 = 0.4
n := 1500
α := 0.05
μ := n*p = 600
σ := sqrt(n*p*(1 - p)) = 18.9737
qnorm(1 - α/2, μ, σ/sqrt(n)) = 600.96
qnorm(α/2, μ, σ/sqrt(n)) = 599.04
# Wenn Erwartungswert gegeben ist dann kein σ/sqrt(n)sondern nur σ. Wenn man den Erwartungswert mean(X) berechnet, dann σ/sqrt(n)
# b)
b := 1 - pbinom(1, 10, q) = 0.83109
# 21)
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# A: Der Ausdruck
# gibt die Anordnung von 3 Kugeln aus 5 Möglichen Kugeln an.
# 22)
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clear(a, d)
# a)
f(x) := a*x + d
[f(0) == 250; f(5) == 0] solve, a, d → [-50, 250]
f(x) := -50*x + 250
f2(x) := -100*x + 250
# [plot: f(x), f2(x) vs x]
# 23)
# 24)
# Ist das selbe wie Nummer 3.
# 25)
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# a)
# b)
0.5*0.02 + 0.3*0.03 + 0.2*0.05 = 0.029  # A: Die Wahrscheinlichkeit beträgt 2.9 %.
0.5*0.02/0.029 = 0.344828  # A: 34.48 %
# In Österreich besitzen
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(a)
# Österreich hat kapp 9 millionen einwohner. und es gibt nur 0 oder nicht null
(b)
1 - pbinom(2, 10, 0.37) = 0.779429
(c)
# das mindestens eine person von 10 hat die was die blutgruppe 0 ist
# 32)
α := 0.05
clear(μ, σ)
z_1 := qnorm(1 - α, 0, 1) = 1.64485
α := 0.01
z_2 := qnorm(1 - α, 0, 1) = 2.32635
[(21.9 - μ)/σ == -z_1; (22.2 - μ)/σ == z_2] solve, μ, σ → [22.0242586376, 0.0755438876433]
# 36)
X := [10.42; 11.86; 8.9; 10.28; 9.86; 11.31; 8.57; 9.42; 11.31; 8.36]
α := 0.01
μ_x := mean(X) = 10.029
σ_x := Stdev(X) = 1.22196
n := 10
p_x := μ_x - qt(1 - α/2, n - 1)*σ_x/sqrt(n) = 8.77321
# A: Finde den Fehler
p_y := μ_x + qt(1 - α/2, n - 1)*σ_x/sqrt(n)
p_y := μ_x + qt(1 - α/2, n - 1)*σ_x/sqrt(n) = 11.2848
# Beispiel 41
a := 73
s := 150
α := 48*deg
x := a^2 + s^2 - 2*a*s*cos((90*deg) + α) = 44103.9
x_neu := sqrt(x) = 210.009
# Beispiel 42
x := 1.0 - 0.2 = 0.8
γ := 65*deg
b := 0.8/sin(γ) = 0.882702
b^2 == 0.8^2 + c^2
c := sqrt(b^2 - 0.8^2) = 0.373046
x := (c + 0.6) - 0.8 = 0.173046
a := sqrt(x^2 + 0.8^2) = 0.818502
atan(0.8/x) = 77.7945 deg
# Beispiel 43
X := [1; 2; 3; 4; 5]
Y := [13; 24; 39; 68; 117]
f(t, a, λ) := a*e^(λ*t)
vg := [1; 1]
[a; λ] := genfit(X, Y, vg, f) = [7.78908; 0.541789]
f(t) := a*e^(λ*t) → 7.78908197784*2.71828182846^(0.541788852422*t)
f(6) = 201.03
# Beispiel 44
25*3.6 = 90
v_3(t) := 5*t + 10
v_3(2) = 20
# [plot: v_3(t)*(1 ≤ t ≤ 3) vs t]
# Beispiel 45
clear(x, a, b, c, d)
K(x) := a*x^3 + b*x^2 + c*x + d
K'(x) := d/dx(K(x)) → 3*a*x^2 + 2*b*x + c
C(x) := K(x)/x → (a*x^3 + b*x^2 + c*x + d)/x
C'(x) := d/dx(C(x)) → 2*a*x + (b - d/x^2)
K''(x) := d/dx(K'(x)) → 6*a*x + 2*b
[a, b, c, d] := [K'(10) == 450; C'(25) == 0; K(25) == 22500; K''(10) == 0] solve, a, b, c, d → [2/3, -20, 650, 25000/3]
K(x) := a*x^3 + b*x^2 + c*x + d → 2*x^3/3 + 25000/3 + (650*x - 20*x^2)
# 46)
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# 1) Richtig
# 2)
# Falsch
# 3)
# Falsch
# 4)
# Falsch
# 5)
# Richtig
K(x) := a*x^3 + b*x^2 + c*x + d → 2*x^3/3 + 25000/3 + (650*x - 20*x^2)
# Beispiel 47
clear(G, E, K, x)
K(x) := 0.2*x^2 + 8*x + 280 - 500/(x + 4)
n(x) := 220 - 4*x
K(0) = 155
E(x) := x*n(x) → x*(-(4*x) + 220)
G(x) := E(x) - K(x) → 500.0/(x + 4.0) + (x*(220.0 - 4.0*x) - (0.2*x^2 + 8.0*x + 280.0))
x := G(x) == 0 solve, x → [-3.5381799389; 0.848593253891; 49.1657771612]
clear(x)
G'(x) := d/dx(G(x)) → -1.0*(0.847032947254*10^-21*x + 500.0)/(x^2 + 8.0*x + 16.0) + (212.0 - 8.4*x)
G'(x) == 0 solve, x → [-5.3939819028; -2.53605427908; 25.16813142]
# Beispiel 48
integral(f(x), x = -2 .. 0) - integral(f(x), x = 0 .. 2) + integral(f(x), x = 2 .. 3)
# Beispiel 49
f(x) := -0.00108*x^3 + 0.046*x^2 - 0.4367*x + 3
f'(x) := d/dx(f(x)) → -0.00324*x^2 + 0.092*x - 0.4367
f'(x) == 0 solve, x → [6.0252648368; 22.3697968916]
x_eng := f(6.0252648368) = 1.8025
x_weit := f(22.3697968916) = 4.16033
x_eng*2 = 3.60501
x_weit*2 = 8.32065
π*integral(f(x)^2, x = 2 .. 23) = 574.305
clear(y'(x))  # error: Ein Variablenname wird hier benötigt.
# 64)
k := 0.1
y(x) := -1/20*x^2
# a)
g(x) := k*x + d
y'(x) := d/dx(y(x)) → -x/10
y'(x) == 0.1 solve, x → -1.0
# b)
P := [-1; -1/20]
k := 0.1
d := -1/20 == -1*k + d solve, d →  # error: Falsche Auflösungsvariable.
g(x) := k*x + d
# c)
y(-20) - g(-20)  # error: Diese Variable ist nicht definiert. Prüfen Sie, ob die Beschriftung richtig festgelegt ist.
y(15) - g(15)  # error
# d)
h(x) := 1/100*x^3 - 3/4*x^2 + 4
N := h(x) == 2.5 solve, x; float → [74.9733143467; -1.40118532853; 1.42787098179]
b := |N[1]| + N[2] → 2.82905631031
# [plot: h(x), 2.5 vs x]
# A: Die Breite des Gehwegs beträgt 2.83 Meter
# 65)
X := [1; 2; 3; 4; 5]
Y := [13; 24; 39; 68; 119]
f(t, a, λ) := a*e^(λ*t)
vg := [1; 1]
[a; λ] := genfit(X, Y, vg, f) = [7.58347; 0.55022]
f(t) := a*e^(λ*t) → 7.5834734151*2.71828182846^(0.550219634895*t)
f(6) → 205.879107197
# 66)
clear(a, b, c, d, x, y, f)
f(x) := a*x^3 + b*x^2 + c*x + d
f'(x) := d/dx(f(x)) → 3*a*x^2 + 2*b*x + c
f''(x) := d/dx(f'(x)) → 6*a*x + 2*b
y(x) := a*x^2 + b*x + c
[f'(-3/2) == -5/4; f'(0) == 1; f(0) == 2/3; f''(0) == 0] solve, a, b, c, d → [-1/3, 0, 1, 2/3]
[y(-3/2) == 1/2; y(0) == 2/3; y'(0) == 0] solve, a, b, c → [-2/27, 0, 2/3]
# 67)
h(x) := (e^(-0.181*x^2) - 0.915)
